// SBML level 3 version 1

model M1()

  // Compartments:
  compartment Compartment = 1;

  // Species:
  species R in Compartment = 1/Compartment;
  species Rp in Compartment = 0;
  species RS in Compartment = 1/Compartment;
  species RSp in Compartment = 0;
  species S in Compartment = 1/Compartment;

  // Parameters:
  k1 = 1;
  k2 = 0.0001;
  kfeed = 1000000;
  k4 = 1;
  k5 = 0.01;

  // Assignment rules:
  t := time;
  r1 := R*S*k1;
  r2 := Rp*k2;
  r3 := Rp*RSp*kfeed;
  r4 := RSp*k4;
  r5 := RS*Rp*k5;

  // Rate rules:
  R' = r3 + r2 - r1;
  Rp' = r1 - r2 - r3;
  RS' = r4 - r5;
  RSp' = r5 - r4;
  S' = 0;
end
